# OpenSim document version 40000
InverseKinematicsTool:
  time_range: 1.25 2.3
  output_motion_file: walking_IK.mot
  marker_file: ../ExperimentalData/walking.trc
  IKTaskSet:
    IKMarkerTask RSHO: apply=true weight=1
    IKMarkerTask LSHO: apply=true weight=1
    IKMarkerTask RASI: apply=true weight=500
    IKMarkerTask LASI: apply=true weight=500
    IKMarkerTask RPSI: apply=true weight=500
    IKMarkerTask RTHAP: apply=true weight=10
    IKMarkerTask RTHAD: apply=true weight=10
    IKMarkerTask RTHI: apply=true weight=10
    IKMarkerTask RKNE: apply=true weight=100
    IKMarkerTask RKNM: apply=false weight=1
    IKMarkerTask RTIB: apply=true weight=10
    IKMarkerTask RTIAP: apply=true weight=10
    IKMarkerTask RTIAD: apply=true weight=10
    IKMarkerTask RANK: apply=true weight=100
    IKMarkerTask RMED: apply=false weight=1
    IKMarkerTask RHEE: apply=true weight=50
    IKMarkerTask RTOE: apply=true weight=50
    IKMarkerTask LTHAP: apply=true weight=10
    IKMarkerTask LTHI: apply=true weight=10
    IKMarkerTask LTHAD: apply=true weight=10
    IKMarkerTask LKNE: apply=true weight=100
    IKMarkerTask LKNM: apply=false weight=1
    IKMarkerTask LTIB: apply=true weight=10
    IKMarkerTask LTIAD: apply=true weight=10
    IKMarkerTask LTIAP: apply=true weight=10
    IKMarkerTask LANK: apply=true weight=100
    IKMarkerTask LMED: apply=false weight=1
    IKMarkerTask LHEE: apply=true weight=50
    IKMarkerTask LTOE: apply=true weight=50
    IKMarkerTask LPSI: apply=true weight=500
    IKMarkerTask CLAV: apply=true weight=1
