# OpenSim document version 40000
AnalyzeTool AnalisisUI:
  model_file: Solutions/MuscleAnlysis/Part2/M2/Models/subject_scaled_RRA2_MW_160Perc.osim
  replace_force_set: false
  force_set_files: gait2392_CMC_Actuators.xml
  results_directory: Solutions/UI
  output_precision: 8
  initial_time: 1.25
  final_time: 2.3
  solve_for_equilibrium_for_auxiliary_states: false
  maximum_number_of_integrator_steps: 20000
  maximum_integrator_step_size: 1
  minimum_integrator_step_size: 1e-8
  integrator_error_tolerance: 1e-5
  external_loads_file: GRF_file_walkingNormal.xml
  states_file: RRA/subject_scaled_2392_RRA_states.sto
  lowpass_cutoff_frequency_for_coordinates: -1
  AnalysisSet Analyses:
    StaticOptimization: on=false start_time=1.25 end_time=2.3 step_interval=10 in_degrees=true use_model_force_set=true
        activation_exponent=2 use_muscle_physiology=true optimizer_convergence_criterion=0.0001
        optimizer_max_iterations=100
    MuscleAnalysis: start_time=1.25 end_time=2.3 step_interval=10 in_degrees=true muscle_list=all
        moment_arm_coordinate_list=all compute_moments=true
